g := -9.8
m := 1
aa := 1
Ω := 5
λ := g/(aa*Ω^2) = -0.392
γ := aa^2*m
ind_st := 0
ind_end := 5
ind_count := 1*10^2 - 1
D(u, Y) := [Y[1]; m*aa^2*Ω^2/γ*sin(Y[0])*(cos(Y[0]) - λ)]
Equation(a, b) := Rkadapt([a; b], ind_st, ind_end, ind_count, D)
x_0 := 0
y_0 := -4
x_n := 2*π
y_n := 4
x_count := 7
y_count := 9
X_st := x_0, x_0 + (x_n - x_0)/(x_count - 1) .. x_n
Y_st := y_0, y_0 + (y_n - y_0)/(y_count - 1) .. y_n
XY_st := [
    -π, -π, -π, -π, -π, 0, π/5, 2*π/5, 3*π/5, 4*π/5, π, π, π, π, π;
    4, 3, 2, 1, 0, 0, 0, 0, 0, 0, 0, -1, -2, -3, -4
]
M_XY :=
    k ← 0
    for i ∈ 0 .. cols(XY_st) - 1
        k ← k + 1
        M_XY ← Equation(XY_st[:, i][0], XY_st[:, i][1])
        if k == 1
            M_X ← M_XY[:, 1]
            M_Y ← M_XY[:, 2]
        otherwise
            M_X ← augment(M_X, M_XY[:, 1])
            M_Y ← augment(M_Y, M_XY[:, 2])
    [M_X; M_Y]  # disabled
M_XY :=
    k ← 0
    for x ∈ X_st
        for y ∈ Y_st
            M_XY ← Equation(x, y)
            k ← k + 1
            if k == 1
                M_X ← M_XY[:, 1]
                M_Y ← M_XY[:, 2]
            otherwise
                M_X ← augment(M_X, M_XY[:, 1])
                M_Y ← augment(M_Y, M_XY[:, 2])
    [M_X; M_Y]
M_XY[1] =  # no stored result
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R := 1
MMM :=
    kk ← 0
    for j ∈ 0 .. cols(M_XY[0]) - 1
        k ← 0
        for i ∈ 0 .. rows(M_XY[0]) - 1
            X ← M_XY[0][i, j]
            if (|X - π| ≤ π)
                M_X[k] ← R*cos(X)
                M_Y[k] ← R*sin(X)
                M_Z[k] ← M_XY[1][i, j]
                k ← k + 1
            M_XYZ ← [M_X; M_Y; M_Z]
        MM[j] ← M_XYZ
    MM
M_cylinder :=
    for i ∈ 0 .. rows(M_XY[0]) - 1
        for j ∈ 0 .. cols(M_XY[0]) - 1
            K ← M_XY[0][i, j]
            M_X[i, j] ← R*cos(K)
            M_Y[i, j] ← R*sin(K)
    [M_X; M_Y]
MMM[0][0] = [1]
# [component: inputs (M_cylinder[0], M_cylinder[1], M_XY[1])]
M_cylinder[0] =  # no stored result
XXX := MMM[30][0][:, 0]
YYY := MMM[30][1][:, 0]
MMM[30][0] = [
    -1; -0.998708; -0.994635; -0.987161; -0.975179; -0.956988; -0.930178; -0.891563; -0.837289; -0.763304
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]
ZZZ := MMM[30][2][:, 0]
# [component: inputs MMM, ([XXX[FRAME]], [YYY[FRAME]], [ZZZ[FRAME]])]
[ZZZ[FRAME]] = [-1]
XXX[0] = -1
